# Worksheet setting: ORIGIN = 1
I := I_c
x_c1 := -OC*cos(π/3 - α) - e*cos(ϕ_1) + x substitute, α == α(t), ϕ_1 == ϕ_1(t) → x - cos(ϕ_1(t))*e - OC*sin(π/6 + α(t))
x_c2 := OC*cos(π/3 - α) + e*cos(ϕ_2) + x substitute, α == α(t), ϕ_2 == ϕ_2(t) → x + cos(ϕ_2(t))*e + OC*sin(π/6 + α(t))
y_c1 := -OC*sin(π/3 - α) + e*sin(ϕ_1) + y substitute, α == α(t), ϕ_1 == ϕ_1(t) → y + sin(ϕ_1(t))*e - OC*cos(π/6 + α(t))
y_c2 := OC*sin(π/3 - α) + e*sin(ϕ_2) + y substitute, α == α(t), ϕ_2 == ϕ_2(t) → y + sin(ϕ_2(t))*e + OC*cos(π/6 + α(t))
d/dt(x_c1) → (d/dt(ϕ_1(t)))*sin(ϕ_1(t))*e - OC*cos(π/6 + α(t))*d/dt(α(t)) substitute, d/dt(α(t)) == ω_α, α(t) == α, d/dt(ϕ_1(t)) == ω_ϕ1, ϕ_1(t) == ϕ_1 → ω_ϕ1*e*sin(ϕ_1) - ω_α*OC*cos(π/6 + α)
d/dt(x_c2) → OC*cos(π/6 + α(t))*d/dt(α(t)) - (d/dt(ϕ_2(t)))*sin(ϕ_2(t))*e substitute, d/dt(α(t)) == ω_α, α(t) == α, d/dt(ϕ_2(t)) == ω_ϕ2, ϕ_2(t) == ϕ_2 → ω_α*OC*cos(π/6 + α) - ω_ϕ2*e*sin(ϕ_2)
d/dt(y_c1) → (d/dt(ϕ_1(t)))*cos(ϕ_1(t))*e + OC*sin(π/6 + α(t))*d/dt(α(t)) substitute, d/dt(α(t)) == ω_α, α(t) == α, d/dt(ϕ_1(t)) == ω_ϕ1, ϕ_1(t) == ϕ_1 → ω_ϕ1*e*cos(ϕ_1) + ω_α*OC*sin(π/6 + α)
d/dt(y_c2) → (d/dt(ϕ_2(t)))*cos(ϕ_2(t))*e - OC*sin(π/6 + α(t))*d/dt(α(t)) substitute, d/dt(α(t)) == ω_α, α(t) == α, d/dt(ϕ_2(t)) == ω_ϕ2, ϕ_2(t) == ϕ_2 → ω_ϕ2*e*cos(ϕ_2) - ω_α*OC*sin(π/6 + α)
v_xc1 := ω_ϕ1*e*sin(ϕ_1) - ω_α*OC*cos(π/6 + α)
v_xc2 := ω_α*OC*cos(π/6 + α) - ω_ϕ2*e*sin(ϕ_2)
v_yc1 := ω_ϕ1*e*cos(ϕ_1) + ω_α*OC*sin(π/6 + α)
v_yc2 := ω_ϕ2*e*cos(ϕ_2) - ω_α*OC*sin(π/6 + α)
x_c1 := -OC*cos(π/3 - α) - e*cos(ϕ_1) + x
x_c2 := OC*cos(π/3 - α) + e*cos(ϕ_2) + x
y_c1 := OC*sin(π/3 - α) + e*sin(ϕ_1) + y
y_c2 := OC*sin(π/3 - α) + e*sin(ϕ_2) + y
T := 1/2*m*(v_x^2 + v_y^2) + 1/2*I_c*ω_α^2 + 1/2*m_w*v_xc1^2 + 1/2*m_w*v_yc1^2 + 1/2*I_0*ω_ϕ1^2 + 1/2*m_w*v_xc2^2 + 1/2*m_w*v_yc2^2 + 1/2*I_0*ω_ϕ2^2
V := m*g*y + m_w*g*y_c1 + m_w*g*y_c2 + 1/2*k_x*(-x - h*α)^2 + 1/2*k_y*(y + l*α)^2
N := 1/2*b_x*(v_x - h*ω_α)^2 + 1/2*b_y*(v_y + l*ω_α)^2
L := T - V
L → I_c*ω_α^2/2 + I_0*ω_ϕ1^2/2 + I_0*ω_ϕ2^2/2 + m*(v_x^2 + v_y^2)/2 - k_x*(x + α*h)^2/2 - k_y*(y + α*l)^2/2 + m_w*(ω_ϕ1*e*cos(ϕ_1) + ω_α*OC*sin(π/6 + α))^2/2 + m_w*(ω_ϕ2*e*cos(ϕ_2) - ω_α*OC*sin(π/6 + α))^2/2 + m_w*(ω_ϕ2*e*sin(ϕ_2) - ω_α*OC*cos(π/6 + α))^2/2 + m_w*(ω_ϕ1*e*sin(ϕ_1) - ω_α*OC*cos(π/6 + α))^2/2 - g*m*y - m_w*g*(y + e*sin(ϕ_1) + OC*sin(π/3 - α)) - m_w*g*(y + e*sin(ϕ_2) + OC*sin(π/3 - α))
d/dx(L) substitute, x == x(t), α == α(t) → -(k_x*x(t)) - k_x*h*α(t)
d/dy(L) substitute, y == y(t), α == α(t) → -(k_y*y(t)) - 2*m_w*g - g*m - k_y*l*α(t)
d/dα(L) substitute, α == α(t), x == x(t), y == y(t), ω_α == d/dt(α(t)), ϕ_1 == ϕ_1(t), ϕ_2 == ϕ_2(t), ω_ϕ1 == d/dt(ϕ_1(t)), ω_ϕ2 == d/dt(ϕ_2(t)) → m_w*OC^2*(d/dt(α(t)))^2*sin(π/3 + 2*α(t))/2 - k_y*l*y(t) - k_x*h^2*α(t) - k_y*l^2*α(t) - k_x*h*x(t) - m_w*OC^2*(d/dt(α(t)))^2*sin(π/3 + 2*α(t))/2 + 2*m_w*g*OC*sin(π/6 + α(t)) + m_w*OC*d/dt(α(t))*d/dt(ϕ_1(t))*e*cos(π/6 + α(t) + ϕ_1(t))/2 - m_w*OC*d/dt(α(t)*d/dt(ϕ_2(t)*e*cos(π/6 + α(t) + ϕ_2(t)))) - m_w*OC*d/dt(α(t))*d/dt(ϕ_1(t))*e*cos(π/6 + α(t) + ϕ_1(t))/2 + m_w*OC*d/dt(α(t))*d/dt(ϕ_1(t))*cos(π/6 + α(t) - ϕ_1(t))*e/2 + m_w*OC*d/dt(α(t))*d/dt(ϕ_1(t))*cos(π/6 + α(t) - ϕ_1(t))*e/2
d/dϕ_1(L) substitute, ϕ_1 == ϕ_1(t), ω_ϕ1 == d/dt(ϕ_1(t)), ω_α == d/dt(α), α == α(t) → -(m_w*g*cos(ϕ_1(t))*e)
d/dϕ_2(L) substitute, ϕ_2 == ϕ_2(t), ω_ϕ2 == d/dt(ϕ_2(t)), ω_α == d/dt(α), α == α(t) → -(m_w*g*cos(ϕ_2(t))*e)
dLdx := -(k_x*x(t)) - k_x*h*α(t)
dLdy := -(k_y*y(t)) - 2*m_w*g - g*m - k_y*l*α(t)
dLdα := m_w*OC^2*(d/dt(α(t)))^2*sin(π/3 + 2*α(t))/2 - k_y*l*y(t) - k_x*h^2*α(t) - k_y*l^2*α(t) - k_x*h*x(t) - m_w*OC^2*(d/dt(α(t)))^2*sin(π/3 + 2*α(t))/2 + 2*m_w*g*OC*sin(π/6 + α(t)) - m_w*OC*d/dt(α(t))*d/dt(ϕ_1(t))*e*cos(π/6 + α(t) + ϕ_1(t))/2 - m_w*OC*d/dt(α(t)*d/dt(ϕ_2(t)*e*cos(π/6 + α(t) + ϕ_2(t)))) - m_w*OC*d/dt(α(t))*d/dt(ϕ_1(t))*e*cos(π/6 + α(t) + ϕ_1(t))/2 - m_w*OC*d/dt(α(t))*d/dt(ϕ_1(t))*cos(π/6 + α(t) - ϕ_1(t))*e/2 + m_w*OC*d/dt(α(t))*d/dt(ϕ_1(t))*cos(π/6 + α(t) - ϕ_1(t))*e/2
dLdϕ_1 := -(m_w*g*cos(ϕ_1(t))*e)
dLdϕ_2 := -(m_w*g*cos(ϕ_2(t))*e)
d/dv_x(L) substitute, v_x == d/dt(x(t)) → m*d/dt(x(t))
d/dv_y(L) substitute, v_y == d/dt(y(t)) → m*d/dt(y(t))
d/dω_α(L) substitute, α == α(t), x == x(t), y == y(t), ω_α == d/dt(α(t)), ϕ_1 == ϕ_1(t), ϕ_2 == ϕ_2(t), ω_ϕ1 == d/dt(ϕ_1(t)), ω_ϕ2 == d/dt(ϕ_2(t)) → I_c*d/dt(α(t)) + 3*m_w*OC^2*d/dt(α(t))/2 + m_w*OC^2*d/dt(α(t))/2 - m_w*OC^2*d/dt(α(t))*cos(π/3 + 2*α(t))/2 + m_w*OC^2*d/dt(α(t))*cos(π/3 + 2*α(t))/2 + m_w*OC*d/dt(ϕ_1(t))*sin(π/6 + α(t) - ϕ_1(t))*e/2 + m_w*OC*d/dt(ϕ_1(t))*sin(π/6 + α(t) - ϕ_1(t))*e/2 + m_w*OC*d/dt(ϕ_1(t))*e*sin(π/6 + α(t) + ϕ_1(t))/2 - m_w*OC*d/dt(ϕ_2(t)*e*sin(π/6 + α(t) + ϕ_2(t))) - m_w*OC*d/dt(ϕ_1(t))*e*sin(π/6 + α(t) + ϕ_1(t))/2
d/dω_ϕ1(L) substitute, ϕ_1 == ϕ_1(t), ω_ϕ1 == d/dt(ϕ_1(t)), ω_α == d/dt(α), α == α(t) → I_0*d/dt(ϕ_1(t)) + m_w*d/dt(ϕ_1(t)*e^2)
d/dω_ϕ2(L) substitute, ϕ_2 == ϕ_2(t), ω_ϕ2 == d/dt(ϕ_2(t)), ω_α == d/dt(α), α == α(t) → I_0*d/dt(ϕ_2(t)) + m_w*d/dt(ϕ_2(t)*e^2)
dLdv_x := m*d/dt(x(t))
dLdv_y := m*d/dt(y(t))
dLdω_α := I_c*d/dt(α(t)) + 3*m_w*OC^2*d/dt(α(t))/2 + m_w*OC^2*d/dt(α(t))/2 - m_w*OC^2*d/dt(α(t))*cos(π/3 + 2*α(t))/2 + m_w*OC^2*d/dt(α(t))*cos(π/3 + 2*α(t))/2 - m_w*OC*d/dt(ϕ_1(t))*sin(π/6 + α(t) - ϕ_1(t))*e/2 + m_w*OC*d/dt(ϕ_1(t))*sin(π/6 + α(t) - ϕ_1(t))*e/2 - m_w*OC*d/dt(ϕ_1(t))*e*sin(π/6 + α(t) + ϕ_1(t))/2 - m_w*OC*d/dt(ϕ_2(t)*e*sin(π/6 + α(t) + ϕ_2(t))) - m_w*OC*d/dt(ϕ_1(t))*e*sin(π/6 + α(t) + ϕ_1(t))/2
dLdω_ϕ1 := I_0*d/dt(ϕ_1(t)) + m_w*d/dt(ϕ_1(t)*e^2)
dLdω_ϕ2 := I_0*d/dt(ϕ_2(t)) + m_w*d/dt(ϕ_2(t)*e^2)
d/dt(dLdv_x) → m*d^2/dt^2(x(t))
d/dt(dLdv_y) → m*d^2/dt^2(y(t))
d/dt(dLdω_α) → I_c*d^2/dt^2(α(t)) - m_w*OC*((d^2/dt^2(ϕ_2(t)))*e*sin(π/6 + α(t) + ϕ_2(t)) + 2*d/dt(ϕ_2(t))*e*cos(π/6 + α(t) + ϕ_2(t))*(d/dt(α(t)) + d/dt(ϕ_2(t))) + ϕ_2(t)*e*cos(π/6 + α(t) + ϕ_2(t))*(d^2/dt^2(α(t)) + d^2/dt^2(ϕ_2(t))) - ϕ_2(t)*e*sin(π/6 + α(t) + ϕ_2(t))*(d/dt(α(t)) + d/dt(ϕ_2(t)))^2) + 3*m_w*OC^2*d^2/dt^2(α(t))/2 + m_w*OC^2*d^2/dt^2(α(t))/2 + m_w*OC^2*(d/dt(α(t)))^2*sin(π/3 + 2*α(t)) - m_w*OC^2*(d/dt(α(t)))^2*sin(π/3 + 2*α(t)) - m_w*OC^2*d^2/dt^2(α(t))*cos(π/3 + 2*α(t))/2 + m_w*OC^2*d^2/dt^2(α(t))*cos(π/3 + 2*α(t))/2 - m_w*OC*d^2/dt^2(ϕ_1(t))*sin(π/6 + α(t) - ϕ_1(t))*e/2 + m_w*OC*d^2/dt^2(ϕ_1(t))*sin(π/6 + α(t) - ϕ_1(t))*e/2 - m_w*OC*d^2/dt^2(ϕ_1(t))*e*sin(π/6 + α(t) + ϕ_1(t))/2 - m_w*OC*d^2/dt^2(ϕ_1(t))*e*sin(π/6 + α(t) + ϕ_1(t))/2 - m_w*OC*d/dt(ϕ_1(t))*cos(π/6 + α(t) - ϕ_1(t))*e*(d/dt(α(t)) - d/dt(ϕ_1(t)))/2 + m_w*OC*d/dt(ϕ_1(t))*cos(π/6 + α(t) - ϕ_1(t))*e*(d/dt(α(t)) - d/dt(ϕ_1(t)))/2 - m_w*OC*d/dt(ϕ_1(t))*e*cos(π/6 + α(t) + ϕ_1(t))*(d/dt(α(t)) + d/dt(ϕ_1(t)))/2 - m_w*OC*d/dt(ϕ_1(t))*e*cos(π/6 + α(t) + ϕ_1(t))*(d/dt(α(t)) + d/dt(ϕ_1(t)))/2
d/dt(dLdω_ϕ1) → I_0*d^2/dt^2(ϕ_1(t)) + m_w*d^2/dt^2(ϕ_1(t)*e^2)
d/dt(dLdω_ϕ2) → I_0*d^2/dt^2(ϕ_2(t)) + m_w*d^2/dt^2(ϕ_2(t)*e^2)
ddtdLdv_x := m*d^2/dt^2(x(t))
ddtdLdv_y := m*d^2/dt^2(y(t))
ddtdLdω_α := I_c*d^2/dt^2(α(t)) - m_w*OC*((d^2/dt^2(ϕ_2(t)))*e*sin(π/6 + α(t) + ϕ_2(t)) + 2*d/dt(ϕ_2(t))*e*cos(π/6 + α(t) + ϕ_2(t))*(d/dt(α(t)) + d/dt(ϕ_2(t))) + ϕ_2(t)*e*cos(π/6 + α(t) + ϕ_2(t))*(d^2/dt^2(α(t)) + d^2/dt^2(ϕ_2(t))) - ϕ_2(t)*e*sin(π/6 + α(t) + ϕ_2(t))*(d/dt(α(t)) + d/dt(ϕ_2(t)))^2)
ddtdLdω_ϕ1 := I_0*d^2/dt^2(ϕ_1(t)) + m_w*d^2/dt^2(ϕ_1(t)*e^2)
ddtdLdω_ϕ2 := I_0*d^2/dt^2(ϕ_2(t)) + m_w*d^2/dt^2(ϕ_2(t)*e^2)
d/dv_x(N) substitute, v_x == d/dt(x(t)), ω_α == d/dt(α(t)) → b_x*d/dt(x(t)) - b_x*h*d/dt(α(t))
d/dv_y(N) substitute, v_y == d/dt(y(t)), ω_α == d/dt(α(t)) → b_y*d/dt(y(t)) + b_y*l*d/dt(α(t))
d/dω_α(N) substitute, v_y == d/dt(y(t)), ω_α == d/dt(α(t)), v_x == d/dt(x(t)) → b_x*d/dt(α(t)*h^2) - b_x*d/dt(x(t)*h) + b_y*d/dt(α(t)*l^2) + b_y*d/dt(y(t)*l)
d/dϕ_1(N) → 0
d/dϕ_2(N) → 0
dNdv_x := b_x*d/dt(x(t)) - b_x*h*d/dt(α(t))
dNdv_y := b_y*d/dt(y(t)) + b_y*l*d/dt(α(t))
dNdω_α := b_x*d/dt(α(t)*h^2) - b_x*d/dt(x(t)*h) + b_y*d/dt(α(t)*l^2) + b_y*d/dt(y(t)*l)
dNdω_ϕ1 := 0
dNdω_ϕ2 := 0
